import os
import sdsofa
from stlib.scene import MainHeader, ContactHeader, Scene
from sdsofa.utils.utils import abs_path
from sdsofa.utils.yaml_parser import create_scene_from_yaml
from sdsofa.controller import SceneController

def set_root_directory():
    root_path = os.path.dirname(os.path.dirname(sdsofa.__file__))
    if not os.environ.has_key('ROOT_PATH'):
        os.environ['ROOT_PATH'] = root_path

def create_default_settings(root_node):
    # Default Scene configuration
    scene = Scene(root_node, plugins=["SoftRobots",
                                     "SofaSparseSolver"])
    root_node.createObject("BackgroundSetting", color=[1., 1., 1.])
    root_node.gravity = [0., -981, 0]
    root_node.createObject("FreeMotionAnimationLoop")
    root_node.createObject("GenericConstraintSolver", maxIterations=1e3, tolerance=1e-8)
    ContactHeader(root_node, alarmDistance=1, contactDistance=.75, frictionCoef=.2)
    root_node.createObject("LightManager")
    root_node.createObject("DirectionalLight", color=[1, 1, 1], direction=[0, -1, 0])

# Called when ran with runSofa.
def createScene(root_node):
    # Edit this to point to proper configuration.
    set_root_directory()
    config_file = "configs/scenes/test_scene.yaml"
    create_default_settings(root_node)
    objects = create_scene_from_yaml(root_node, config_file)
    controller = SceneController(root_node, objects)
    return root_node
